# OpenSim document version 30000
Model 20170320_pfw00625-scaled:
  length_units: meters
  force_units: N
  gravity: 0 -9.80665 0
  credits:
    A planar reduced gait model with 9 degrees of freedom and 18 muscles by Ajay Seth. Adjusted by Carmichael Ong to follow muscle strengths of Handsfield/Rajagopal and changed hamstrings to follow semimembranosus. Ankle passive mechanics based on Weiss, Kearney, and Hunter 1986. Closely based on Delp S.L., Loan J.P., Hoy M.G., Zajac F.E., Topp E.L., Rosen J.M., Thelen D.G., Anderson F.C., Seth A. Notes: 3D, 23 DOF gait model created by D.G. Thelen, Univ. of Wisconsin-Madison, and Ajay Seth, Frank C. Anderson, and Scott L. Delp, Stanford University. Lower extremity joint defintions based on Delp et al. (1990). Low back joint and anthropometry based on Anderson and Pandy (1999, 2001). Planar knee model of Yamaguchi and Zajac (1989). Seth replaced tibia translation constraints with a CustomJoint for the knee and removed the patella to eliminate all kinematic constraints; insertions of the quadrucepts are handled with moving points in the tibia frame as defined by Delp 1990. Number of muscles was reduced by Anderson to improve simulation speed for demonstrations and is not intended to be used in research. License: Creative Commons (CCBY 3.0). You are free to distribute, remix, tweak, and build upon this work, even commercially, as long as you credit us for the original creation. http://creativecommons.org/licenses/by/3.0/ More Information: http://simtk-confluence.stanford.edu:8080/display/OpenSim/Gait+2392+and+2354+Models
  publications:
    Delp, S.L., Loan, J.P., Hoy, M.G., Zajac, F.E., Topp E.L., Rosen, J.M.: An interactive graphics-based model of the lower extremity to study orthopaedic surgical procedures, IEEE Transactions on Biomedical Engineering, vol. 37, pp. 757-767, 1990. Yamaguchi G.T., Zajac F.E.: A planar model of the knee joint to characterize the knee extensor mechanism." J . Biomech. vol. 22. pp. 1-10. 1989. Anderson F.C., Pandy M.G.: A dynamic optimization solution for vertical jumping in three dimensions. Computer Methods in Biomechanics and Biomedical Engineering 2:201-231, 1999. Anderson F.C., Pandy M.G.: Dynamic optimization of human walking. Journal of Biomechanical Engineering 123:381-390, 2001.
  BodySet:
    Body ground: mass=0 mass_center=(0 0 0) inertia_xx=0 inertia_yy=0 inertia_zz=0
    Body pelvis: mass=7.728479 mass_center=(-0.0614383 0 0) inertia_xx=0.05094388 inertia_yy=0.04316354
        inertia_zz=0.0286931 meshes=(sacrum.vtp pelvis.vtp l_pelvis.vtp)
      PlanarJoint ground_pelvis: parent_body=ground location_in_parent=(0 0 0) location=(0 0 0)
        Coordinate pelvis_tilt: motion_type=rotational default_value=0 range=(-1.570796 1.570796) clamped=false
        Coordinate pelvis_tx: motion_type=translational default_value=0 range=(-5 5) clamped=false
        Coordinate pelvis_ty: motion_type=translational default_value=0 range=(-1 2) clamped=false
    Body femur_r: mass=6.103903 mass_center=(0 -0.14773 0) inertia_xx=0.06635589 inertia_yy=0.01739426
        inertia_zz=0.0699735 meshes=femur.vtp
      PinJoint hip_r: parent_body=pelvis location_in_parent=(-0.0614383 -0.0574409 0.0725615) location=(0 0 0)
        Coordinate hip_flexion_r: motion_type=rotational default_value=0 range=(-2.094395 2.094395) clamped=false
    Body tibia_r: mass=2.432991 mass_center=(0 -0.162242 0) inertia_xx=0.02497638 inertia_yy=0.002527371
        inertia_zz=0.02532327 meshes=(tibia.vtp fibula.vtp)
      CustomJoint knee_r: parent_body=femur_r location_in_parent=(0 0 0) location=(0 0 0)
        Coordinate knee_angle_r: motion_type=rotational default_value=0 range=(-2.094395 0.1745329) clamped=false
        SpatialTransform: axes_held_at_zero=(rotation2 rotation3 translation3)
          TransformAxis rotation1: coordinates=knee_angle_r axis=(0 0 1) LinearFunction(coefficients=1 0)
          TransformAxis translation1: coordinates=knee_angle_r axis=(1 0 0)
            MultiplierFunction: scale=0.869
              SimmSpline: x=(-2.0944 -1.74533 -1.39626 -1.0472 -0.698132 -0.349066 -0.174533 0.197344 0.337395 0.490178 1.52146 2.0944)
                  y=(-0.0032 0.00179 0.00411 0.0041 0.00212 -0.001 -0.0031 -0.005227 -0.005435 -0.005574 -0.005435 -0.00525)
          TransformAxis translation2: coordinates=knee_angle_r axis=(0 1 0)
            MultiplierFunction: scale=0.869
              SimmSpline: x=(-2.0944 -1.22173 -0.523599 -0.349066 -0.174533 0.159149 2.0944)
                  y=(-0.4226 -0.4082 -0.399 -0.3976 -0.3966 -0.395264 -0.396)
    Body talus_r: mass=0.06562349 mass_center=(0 0 0) inertia_xx=0.000495563 inertia_yy=0.000495563
        inertia_zz=0.000495563 meshes=talus.vtp
      PinJoint ankle_r: parent_body=tibia_r location_in_parent=(0 -0.37367 0) location=(0 0 0)
        Coordinate ankle_angle_r: motion_type=rotational default_value=0 range=(-1.570796 1.570796) clamped=false
    Body calcn_r: mass=0.8202936 mass_center=(0.0869 0.02607 0) inertia_xx=0.0006937882 inertia_yy=0.001932696
        inertia_zz=0.002031808 meshes=foot.vtp
      WeldJoint subtalar_r: parent_body=talus_r location_in_parent=(-0.04238113 -0.03645455 0.00688248)
          location=(0 0 0)
    Body toes_r: mass=0.1421405 mass_center=(0.0300674 0.005214 -0.0152075) inertia_xx=4.95563e-5 inertia_yy=9.91126e-5
        inertia_zz=4.95563e-5 meshes=bofoot.vtp
      WeldJoint mtp_r: parent_body=calcn_r location_in_parent=(0.1553772 -0.001738 0.00093852) location=(0 0 0)
    Body femur_l: mass=6.103903 mass_center=(0 -0.14773 0) inertia_xx=0.06635589 inertia_yy=0.01739426
        inertia_zz=0.0699735 meshes=l_femur.vtp
      PinJoint hip_l: parent_body=pelvis location_in_parent=(-0.0614383 -0.0574409 -0.0725615) location=(0 0 0)
        Coordinate hip_flexion_l: motion_type=rotational default_value=0 range=(-2.094395 2.094395) clamped=false
    Body tibia_l: mass=2.432991 mass_center=(0 -0.162242 0) inertia_xx=0.02497638 inertia_yy=0.002527371
        inertia_zz=0.02532327 meshes=(l_tibia.vtp l_fibula.vtp)
      CustomJoint knee_l: parent_body=femur_l location_in_parent=(0 0 0) location=(0 0 0)
        Coordinate knee_angle_l: motion_type=rotational default_value=0 range=(-2.094395 0.1745329) clamped=false
        SpatialTransform: axes_held_at_zero=(rotation2 rotation3 translation3)
          TransformAxis rotation1: coordinates=knee_angle_l axis=(0 0 1) LinearFunction(coefficients=1 0)
          TransformAxis translation1: coordinates=knee_angle_l axis=(1 0 0)
            MultiplierFunction: scale=0.869
              SimmSpline: x=(-2.0944 -1.74533 -1.39626 -1.0472 -0.698132 -0.349066 -0.174533 0.197344 0.337395 0.490178 1.52146 2.0944)
                  y=(-0.0032 0.00179 0.00411 0.0041 0.00212 -0.001 -0.0031 -0.005227 -0.005435 -0.005574 -0.005435 -0.00525)
          TransformAxis translation2: coordinates=knee_angle_l axis=(0 1 0)
            MultiplierFunction: scale=0.869
              SimmSpline: x=(-2.0944 -1.22173 -0.523599 -0.349066 -0.174533 0.159149 2.0944)
                  y=(-0.4226 -0.4082 -0.399 -0.3976 -0.3966 -0.395264 -0.396)
    Body talus_l: mass=0.06562349 mass_center=(0 0 0) inertia_xx=0.000495563 inertia_yy=0.000495563
        inertia_zz=0.000495563 meshes=l_talus.vtp
      PinJoint ankle_l: parent_body=tibia_l location_in_parent=(0 -0.37367 0) location=(0 0 0)
        Coordinate ankle_angle_l: motion_type=rotational default_value=0 range=(-1.047198 1.047198) clamped=false
    Body calcn_l: mass=0.8202936 mass_center=(0.0869 0.02607 0) inertia_xx=0.0006937882 inertia_yy=0.001932696
        inertia_zz=0.002031808 meshes=l_foot.vtp
      WeldJoint subtalar_l: parent_body=talus_l location_in_parent=(-0.04238113 -0.03645455 -0.00688248)
          location=(0 0 0)
    Body toes_l: mass=0.1421405 mass_center=(0.0300674 0.005214 0.0152075) inertia_xx=4.95563e-5 inertia_yy=9.91126e-5
        inertia_zz=4.95563e-5 meshes=l_bofoot.vtp
      WeldJoint mtp_l: parent_body=calcn_l location_in_parent=(0.1553772 -0.001738 -0.00093852) location=(0 0 0)
    Body torso: mass=22.46725 mass_center=(-0.02607 0.27808 0) inertia_xx=0.7307077 inertia_yy=0.3743979
        inertia_zz=0.7093489 meshes=(hat_spine.vtp hat_jaw.vtp hat_skull.vtp hat_ribs.vtp)
      PinJoint back: parent_body=pelvis location_in_parent=(-0.0875083 0.0708235 0) location=(0 0 0)
        Coordinate lumbar_extension: motion_type=rotational default_value=-0.0872665 range=(-1.570796 1.570796)
            clamped=false locked=true
    Body head: mass=0 mass_center=(0 0 0) inertia_xx=0 inertia_yy=0 inertia_zz=0
      WeldJoint back: parent_body=torso location_in_parent=(0 0.47795 0) location=(0 0 0)
  ForceSet:
    Thelen2003Muscle [values shared by the 18 below unless stated]: min_control=0 max_control=1 optimal_force=1
        max_contraction_velocity=15 activation_time_constant=0.01 deactivation_time_constant=0.04
        FmaxTendonStrain=0.049
    Thelen2003Muscle hamstrings_r: max_isometric_force=4105.466 optimal_fiber_length=0.059961
        tendon_slack_length=0.303281 pennation_angle_at_optimal=0.2617994 [radians] FmaxMuscleStrain=0.8
      PathPoint semimem_r-P1: pelvis (-0.103585 -0.0847014 0.0621422)
      ConditionalPathPoint semimem_r-P2: tibia_r (-0.0302412 -0.0305801 -0.0164328) range=(-0.558505 0.174533)
          coordinate=knee_angle_r
      PathPoint semimem_r-P3: tibia_r (-0.023463 -0.04146 -0.0170063)
    Thelen2003Muscle bifemsh_r: max_isometric_force=557.1148 optimal_fiber_length=0.09559 tendon_slack_length=0.101673
        pennation_angle_at_optimal=0.4014257
      PathPoint P1: femur_r (0.004345 -0.183446 0.0203346)
      PathPoint P2: tibia_r (-0.0261569 -0.031284 0.0255747)
      PathPoint P3: tibia_r (-0.0203346 -0.0489247 0.0298067)
    Thelen2003Muscle glut_max_r: max_isometric_force=3337.584 optimal_fiber_length=0.136433
        tendon_slack_length=0.041712 pennation_angle_at_optimal=0
      PathPoint glut_max2_r-P1: pelvis (-0.117228 0.0152944 0.0489247)
      PathPoint glut_max2_r-P2: pelvis (-0.119574 -0.045188 0.0794266)
      PathPoint glut_max2_r-P3: femur_r (-0.0370194 -0.046057 0.0254617)
      PathPoint glut_max2_r-P4: femur_r (-0.0135564 -0.0882904 0.0364111)
    Thelen2003Muscle iliopsoas_r: max_isometric_force=2697.344 optimal_fiber_length=0.101673
        tendon_slack_length=0.11297 pennation_angle_at_optimal=0.1396263
      PathPoint psoas_r-P1: pelvis (-0.0562243 0.0770803 0.0251141)
      PathPoint psoas_r-P2: pelvis (-0.0206822 -0.049533 0.0659571)
      ConditionalPathPoint psoas_r-P3: pelvis (-0.0250272 -0.0699545 0.0709104) range=(-1.5708 0.785398)
          coordinate=hip_flexion_r
      PathPoint psoas_r-P4: femur_r (0.0013904 -0.0440583 0.0033022)
      PathPoint psoas_r-P5: femur_r (-0.0163372 -0.0518793 0.0090376)
    Thelen2003Muscle rect_fem_r: max_isometric_force=2191.741 optimal_fiber_length=0.066044
        tendon_slack_length=0.300674 pennation_angle_at_optimal=0.08726646 FmaxMuscleStrain=1 KshapePassive=9
      PathPoint P1: pelvis (-0.0256355 -0.0270259 0.0841192)
      ConditionalPathPoint P2: femur_r (0.0290246 -0.350207 0.0016511) range=(-2.61799 -1.45997)
          coordinate=knee_angle_r
      MovingPathPoint P3: tibia_r (0.0536674 0.0182351 0.0012166) x_coordinate=knee_angle_r y_coordinate=knee_angle_r
          z_coordinate=knee_angle_r
        x_location: MultiplierFunction: scale=0.869
          SimmSpline: x=(-2.0944 -1.99997 -1.5708 -1.45752 -1.39626 -1.0472 -0.698132 -0.526391 -0.349066 -0.174533 0 0.00017453 0.00034907 0.0279253 0.0872665 0.174533 2.0944)
              y=(0.0155805 0.0179938 0.0275081 0.0296564 0.0307615 0.0365695 0.0422074 0.0450902 0.048391 0.0534299 0.0617576 0.0617669 0.0617762 0.0633083 0.066994 0.0733035 0.0573481)
        y_location: MultiplierFunction: scale=0.869
          SimmSpline: x=(-2.0944 -1.99997 -1.5708 -1.45752 -1.39626 -1.0472 -0.698132 -0.526391 -0.349066 -0.174533 0 0.00017453 0.00034907 0.0279253 0.0872665 0.174533 2.0944)
              y=(0.0234116 0.0237613 0.0251141 0.0252795 0.0253146 0.0249184 0.0242373 0.0238447 0.0234197 0.0227644 0.020984 0.0209814 0.0209788 0.0205225 0.0191754 0.0159554 -0.0673774)
        z_location: MultiplierFunction: scale=0.869
          SimmSpline: x=(-2.0944 0.1745) y=(0.0014 0.0014)
    Thelen2003Muscle vasti_r: max_isometric_force=9593.951 optimal_fiber_length=0.086031 tendon_slack_length=0.088638
        pennation_angle_at_optimal=0.05235988 FmaxMuscleStrain=1 KshapePassive=9
      PathPoint vas_int_r-P1: femur_r (0.025201 -0.167196 0.026939)
      PathPoint vas_int_r-P2: femur_r (0.0291115 -0.1811 0.0247665)
      ConditionalPathPoint vas_int_r-P3: femur_r (0.0298067 -0.350207 0.0047795) range=(-2.61799 -1.42)
          coordinate=knee_angle_r
      MovingPathPoint vas_int_r-P4: tibia_r (0.0481975 0.021979 0.0015642) x_coordinate=knee_angle_r
          y_coordinate=knee_angle_r z_coordinate=knee_angle_r
        x_location: MultiplierFunction: scale=0.869
          SimmSpline: x=(-2.0944 -1.99997 -1.5708 -1.45752 -1.39626 -1.0472 -0.698132 -0.526391 -0.349066 -0.174533 0 0.00017453 0.00034907 0.0279253 0.0872665 0.174533 2.0944)
              y=(0.0082733 0.0106866 0.0202042 0.022353 0.0234583 0.0292715 0.0349465 0.037871 0.0412569 0.0465287 0.0554632 0.0554735 0.0554837 0.0571717 0.061272 0.0684368 0.0648818)
        y_location: MultiplierFunction: scale=0.869
          SimmSpline: x=(-2.0944 -1.99997 -1.5708 -1.45752 -1.39626 -1.0472 -0.698132 -0.526391 -0.349066 -0.174533 0 0.00017453 0.00034907 0.0279253 0.0872665 0.174533 2.0944)
              y=(0.025599 0.0259487 0.0273124 0.0274796 0.0275151 0.0271363 0.0265737 0.0263073 0.0261187 0.0260129 0.0252923 0.0252911 0.0252898 0.0250526 0.0242191 0.0218288 -0.0685706)
        z_location: MultiplierFunction: scale=0.869
          SimmSpline: x=(-2.0944 2.0944) y=(0.0018 0.0018)
    Thelen2003Muscle gastroc_r: max_isometric_force=293.1609 optimal_fiber_length=0.044319 tendon_slack_length=0.333696
        pennation_angle_at_optimal=0.296706 FmaxTendonStrain=0.1
      PathPoint med_gas_r-P1: femur_r (-0.016511 -0.34143 -0.0204215)
      ConditionalPathPoint med_gas_r-P2: femur_r (-0.02607 -0.349512 -0.0224202) range=(-0.785398 0.174533)
          coordinate=knee_angle_r
      PathPoint med_gas_r-P3: calcn_r (0 0.026939 -0.0046057)
    Thelen2003Muscle soleus_r: max_isometric_force=495.3123 optimal_fiber_length=0.038236 tendon_slack_length=0.212036
        pennation_angle_at_optimal=0.4363323 FmaxTendonStrain=0.1
      PathPoint P1: tibia_r (-0.0020856 -0.133218 0.0061699)
      PathPoint P2: calcn_r (0 0.026939 -0.0046057)
    Thelen2003Muscle tib_ant_r: max_isometric_force=2116.818 optimal_fiber_length=0.059092 tendon_slack_length=0.206822
        pennation_angle_at_optimal=0.08726646
      PathPoint P1: tibia_r (0.0155551 -0.141126 0.0099935)
      PathPoint P2: tibia_r (0.0285901 -0.343342 -0.0153813)
      PathPoint P3: calcn_r (0.101325 0.0154682 -0.0265045)
    Thelen2003Muscle hamstrings_l: max_isometric_force=4105.466 optimal_fiber_length=0.059961
        tendon_slack_length=0.303281 pennation_angle_at_optimal=0.2617994 FmaxMuscleStrain=0.8
      PathPoint semimem_l-P1: pelvis (-0.103585 -0.0847014 -0.0621422)
      ConditionalPathPoint semimem_l-P2: tibia_l (-0.0302412 -0.0305801 0.0164328) range=(-0.558505 0.174533)
          coordinate=knee_angle_l
      PathPoint semimem_l-P3: tibia_l (-0.023463 -0.04146 0.0170063)
    Thelen2003Muscle bifemsh_l: max_isometric_force=557.1148 optimal_fiber_length=0.09559 tendon_slack_length=0.101673
        pennation_angle_at_optimal=0.4014257
      PathPoint P1: femur_l (0.004345 -0.183446 -0.0203346)
      PathPoint P2: tibia_l (-0.0261569 -0.031284 -0.0255747)
      PathPoint P3: tibia_l (-0.0203346 -0.0489247 -0.0298067)
    Thelen2003Muscle glut_max_l: max_isometric_force=3337.584 optimal_fiber_length=0.136433
        tendon_slack_length=0.041712 pennation_angle_at_optimal=0
      PathPoint glut_max2_l-P1: pelvis (-0.117228 0.0152944 -0.0489247)
      PathPoint glut_max2_l-P2: pelvis (-0.119574 -0.045188 -0.0794266)
      PathPoint glut_max2_l-P3: femur_l (-0.0370194 -0.046057 -0.0254617)
      PathPoint glut_max2_l-P4: femur_l (-0.0135564 -0.0882904 -0.0364111)
    Thelen2003Muscle iliopsoas_l: max_isometric_force=2697.344 optimal_fiber_length=0.101673
        tendon_slack_length=0.11297 pennation_angle_at_optimal=0.1396263
      PathPoint psoas_l-P1: pelvis (-0.0562243 0.0770803 -0.0251141)
      PathPoint psoas_l-P2: pelvis (-0.0206822 -0.049533 -0.0659571)
      ConditionalPathPoint psoas_l-P3: pelvis (-0.0250272 -0.0699545 -0.0709104) range=(-1.5708 0.785398)
          coordinate=hip_flexion_l
      PathPoint psoas_l-P4: femur_l (0.0013904 -0.0440583 -0.0033022)
      PathPoint psoas_l-P5: femur_l (-0.0163372 -0.0518793 -0.0090376)
    Thelen2003Muscle rect_fem_l: max_isometric_force=2191.741 optimal_fiber_length=0.066044
        tendon_slack_length=0.300674 pennation_angle_at_optimal=0.08726646 FmaxMuscleStrain=1 KshapePassive=9
      PathPoint P1: pelvis (-0.0256355 -0.0270259 -0.0841192)
      ConditionalPathPoint P2: femur_l (0.0290246 -0.350207 -0.0016511) range=(-2.61799 -1.45997)
          coordinate=knee_angle_l
      MovingPathPoint P3: tibia_l (0.0536674 0.0182351 -0.0012166) x_coordinate=knee_angle_l y_coordinate=knee_angle_l
          z_coordinate=knee_angle_l
        x_location: MultiplierFunction: scale=0.869
          SimmSpline: x=(-2.0944 -1.99997 -1.5708 -1.45752 -1.39626 -1.0472 -0.698132 -0.526391 -0.349066 -0.174533 0 0.00017453 0.00034907 0.0279253 0.0872665 0.174533 2.0944)
              y=(0.0155805 0.0179938 0.0275081 0.0296564 0.0307615 0.0365695 0.0422074 0.0450902 0.048391 0.0534299 0.0617576 0.0617669 0.0617762 0.0633083 0.066994 0.0733035 0.0573481)
        y_location: MultiplierFunction: scale=0.869
          SimmSpline: x=(-2.0944 -1.99997 -1.5708 -1.45752 -1.39626 -1.0472 -0.698132 -0.526391 -0.349066 -0.174533 0 0.00017453 0.00034907 0.0279253 0.0872665 0.174533 2.0944)
              y=(0.0234116 0.0237613 0.0251141 0.0252795 0.0253146 0.0249184 0.0242373 0.0238447 0.0234197 0.0227644 0.020984 0.0209814 0.0209788 0.0205225 0.0191754 0.0159554 -0.0673774)
        z_location: MultiplierFunction: scale=0.869
          SimmSpline: x=(-2.0944 0.1745) y=(-0.0014 -0.0014)
    Thelen2003Muscle vasti_l: max_isometric_force=9593.951 optimal_fiber_length=0.086031 tendon_slack_length=0.088638
        pennation_angle_at_optimal=0.05235988 FmaxMuscleStrain=1 KshapePassive=9
      PathPoint vas_int_l-P1: femur_l (0.025201 -0.167196 -0.026939)
      PathPoint vas_int_l-P2: femur_l (0.0291115 -0.1811 -0.0247665)
      ConditionalPathPoint vas_int_l-P3: femur_l (0.0298067 -0.350207 -0.0047795) range=(-2.61799 -1.42)
          coordinate=knee_angle_l
      MovingPathPoint vas_int_l-P4: tibia_l (0.0481975 0.021979 -0.0015642) x_coordinate=knee_angle_l
          y_coordinate=knee_angle_l z_coordinate=knee_angle_l
        x_location: MultiplierFunction: scale=0.869
          SimmSpline: x=(-2.0944 -1.99997 -1.5708 -1.45752 -1.39626 -1.0472 -0.698132 -0.526391 -0.349066 -0.174533 0 0.00017453 0.00034907 0.0279253 0.0872665 0.174533 2.0944)
              y=(0.0082733 0.0106866 0.0202042 0.022353 0.0234583 0.0292715 0.0349465 0.037871 0.0412569 0.0465287 0.0554632 0.0554735 0.0554837 0.0571717 0.061272 0.0684368 0.0648818)
        y_location: MultiplierFunction: scale=0.869
          SimmSpline: x=(-2.0944 -1.99997 -1.5708 -1.45752 -1.39626 -1.0472 -0.698132 -0.526391 -0.349066 -0.174533 0 0.00017453 0.00034907 0.0279253 0.0872665 0.174533 2.0944)
              y=(0.025599 0.0259487 0.0273124 0.0274796 0.0275151 0.0271363 0.0265737 0.0263073 0.0261187 0.0260129 0.0252923 0.0252911 0.0252898 0.0250526 0.0242191 0.0218288 -0.0685706)
        z_location: MultiplierFunction: scale=0.869
          SimmSpline: x=(-2.0944 2.0944) y=(-0.0018 -0.0018)
    Thelen2003Muscle gastroc_l: max_isometric_force=293.1609 optimal_fiber_length=0.044319 tendon_slack_length=0.333696
        pennation_angle_at_optimal=0.296706 FmaxTendonStrain=0.1
      PathPoint med_gas_l-P1: femur_l (-0.016511 -0.34143 0.0204215)
      ConditionalPathPoint med_gas_l-P2: femur_l (-0.02607 -0.349512 0.0224202) range=(-0.785398 0.174533)
          coordinate=knee_angle_l
      PathPoint med_gas_l-P3: calcn_l (0 0.026939 0.0046057)
    Thelen2003Muscle soleus_l: max_isometric_force=495.3123 optimal_fiber_length=0.038236 tendon_slack_length=0.212036
        pennation_angle_at_optimal=0.4363323 FmaxTendonStrain=0.1
      PathPoint P1: tibia_l (-0.0020856 -0.133218 -0.0061699)
      PathPoint P2: calcn_l (0 0.026939 0.0046057)
    Thelen2003Muscle tib_ant_l: max_isometric_force=2116.818 optimal_fiber_length=0.059092 tendon_slack_length=0.206822
        pennation_angle_at_optimal=0.08726646
      PathPoint P1: tibia_l (0.0155551 -0.141126 -0.0099935)
      PathPoint P2: tibia_l (0.0285901 -0.343342 0.0153813)
      PathPoint P3: calcn_l (0.101325 0.0154682 0.0265045)
    HuntCrossleyForce foot_r: transition_velocity=0.1
      ContactParametersSet contact_parameters:
        ContactParameters: geometry=(platform r_heel r_toe1 r_toe2) stiffness=500000 dissipation=1 static_friction=0.8
            dynamic_friction=0.8 viscous_friction=0
    HuntCrossleyForce foot_l: transition_velocity=0.1
      ContactParametersSet contact_parameters:
        ContactParameters: geometry=(platform l_heel l_toe1 l_toe2) stiffness=500000 dissipation=1 static_friction=0.8
            dynamic_friction=0.8 viscous_friction=0
    CoordinateActuator ankle_motor_r: min_control=-120 max_control=120 coordinate=ankle_angle_r optimal_force=1
    CoordinateActuator ankle_motor_l: min_control=-120 max_control=120 coordinate=ankle_angle_l optimal_force=1
    CoordinateLimitForce [values shared by the 6 below unless stated]: upper_stiffness=20 [N*m/degree]
        lower_stiffness=20 [N*m/degree] damping=0.25 transition=10 [degrees]
    CoordinateLimitForce HipLimit_r: coordinate=hip_flexion_r upper_limit=120 [degrees] lower_limit=-30 [degrees]
    CoordinateLimitForce HipLimit_l: coordinate=hip_flexion_l upper_limit=120 lower_limit=-30
    CoordinateLimitForce KneeLimit_r: coordinate=knee_angle_r upper_limit=0 lower_limit=-140
    CoordinateLimitForce KneeLimit_l: coordinate=knee_angle_l upper_limit=0 lower_limit=-140
    CoordinateLimitForce AnkleLimit_r: coordinate=ankle_angle_r upper_limit=20 lower_limit=-40
    CoordinateLimitForce AnkleLimit_l: coordinate=ankle_angle_l upper_limit=20 lower_limit=-40
  ContactGeometrySet:
    ContactHalfSpace platform: body_name=ground location=(0 0 0) orientation=(0 0 -1.570796)
    ContactSphere r_heel: body_name=calcn_r location=(0.03 0.02 0) radius=0.05
    ContactSphere r_toe1: body_name=toes_r location=(0.02 -0.005 -0.026) radius=0.025
    ContactSphere r_toe2: body_name=toes_r location=(0.02 -0.005 0.026) radius=0.025
    ContactSphere l_heel: body_name=calcn_l location=(0.03 0.02 0) radius=0.05
    ContactSphere l_toe1: body_name=toes_l location=(0.02 -0.005 -0.026) radius=0.025
    ContactSphere l_toe2: body_name=toes_l location=(0.02 -0.005 0.026) radius=0.025
